*NODE, DIM = 2D
      1,           0.,           0.
      2,         1.25,           0.
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
*MATERIAL
1, 210000, 0.3

*SECTION, TYPE = SHELL
1, 1, 20

*ELEMENT, TYPE = CPE4, SECTION = 1
  1,   1,   2,  83,  82
  2,   2,   3,  84,  83
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
*BOUNDARY
1, 1, 0.0
1, 2, 0.0
82, 1, 0.0
82, 2, 0.0
163, 1, 0.0
163, 2, 0.0
244, 1, 0.0
244, 2, 0.0
325, 1, 0.0
325, 2, 0.0

*LOAD
81, 1, 100000
81, 2, -5000


*STATIC
